// SBML level 2 version 4

function hill(x, k, n)
  x^n/(k^n + x^n);
end

function synth(x, y, k, n)
  x^n/(k^n + x^n)*(1 - y);
end

function synth2(x, y, w, k, n)
  x^n/(k^n + x^n)*(1 - (y + w));
end

function synth3(x, y, z, w, k, n)
  x^n/(k^n + x^n)*(1 - (y + w + z));
end

function mm(kcat, km, e, s)
  kcat*e*s/(km + s);
end

model cellpop_mitosis_model()

  // Compartments:
  compartment default = 1 volume;

  // Species:
  species Cyclin_B in default = 0;
  species active_Cyclin_B_CDK1 in default = 0; active_Cyclin_B_CDK1 is "active Cyclin B-CDK1";
  substanceOnly species unassembled_spindle in default = 0;
  species s8 in default = 0;
  species assembled_spindle in default = 0;
  substanceOnly species FOXM1 in default = 0;
  substanceOnly species CDC20 in default = 0;
  species CDC20_with_SAC in default = 0;
  substanceOnly species active_CDK1_sensor in default = 0;
  substanceOnly species inactive_CDK1_sensor in default = 1;
  species s108 in default = 0; s108 is "CDK1 sensor dilution";
  substanceOnly species CDC25C in default = 1;
  species p_CDC25C in default = 0; p_CDC25C is "p-CDC25C";
  species s112 in default = 0; s112 is "chromatid separation";
  substanceOnly species nuclear_envelope in default = 1;
  species s114 in default = 0; s114 is "mitotic entry";

  // Parameters:
  mitotic_entry_k = 0.5 substance;
  mitotic_entry_n = 10 substance;
  mitotic_entry = 0.001 substance;
  FOXM1_synthesis = 0.001 substance;
  CyclinB_synthesis_by_FOXM1 = 0.001 substance;
  CyclinB_deactivation = 0.01 substance;
  CyclinB_activation = 0.01 substance;
  CyclinB_activation_by_CDC25C = 0.1 substance;
  CyclinB_activation_by_CDC25C_KM = 0.001 substance;
  CyclinB_degradation = 1e-5 substance;
  CyclinB_degradation_by_CDC20 = 0.01 substance;
  CDC25C_phosphorylation_by_CyclinB = 1 substance;
  CDC25C_phosphorylation_by_CyclinB_k = 0.1 substance;
  CDC25C_phosphorylation_by_CyclinB_n = 11 substance;
  CDC25C_dephosphorylation = 0.01 substance;
  CDC20_activation = 0.01 substance;
  spindle_assembly = 0.001 substance;
  spindle_synthesis = 0.01 substance;
  spindle_synthesis_by_CyclinB_k = 0.5 substance;
  spindle_synthesis_by_CyclinB_n = 16 substance;
  mitotic_checkpoint_assembly = 0.1 substance;
  mitotic_checkpoint_assembly_k = 0.3 substance;
  mitotic_checkpoint_assembly_n = 4 substance;
  SAC_degradation_threshold = 0.8 substance;
  chromatid_separation = 0.01 substance;
  chromatid_separation_k = 0.5 substance;
  chromatid_separation_n = 16 substance;
  nuclear_envelope_breakdown = 0.1 substance;
  nuclear_envelope_breakdown_k = 0.5 substance;
  nuclear_envelope_breakdown_n = 16 substance;
  CDK1_sensor_activation = 0.0001 substance;
  CDK1_sensor_activation_KM = 0.001 substance;
  CDK1_sensor_deactivation = 0.01 substance;
  CDK1_sensor_dilution = 0.0001 substance;
  nuclear_envelope_reformation = 0.0005555556 substance;
  CyclinB_degradation_by_CDC20_KM = 0.001 substance;
  SAC_degradation_threshold_n = 16 substance;
  spindle_assembly_k = 0.01 substance;
  spindle_assembly_n = 1 substance;

  // Reactions:
  re59: active_Cyclin_B_CDK1 => s8; CyclinB_degradation*active_Cyclin_B_CDK1 + mm(CyclinB_degradation_by_CDC20, CyclinB_degradation_by_CDC20_KM, CDC20, active_Cyclin_B_CDK1);  // modifiers: CDC20
  re60: s8 => Cyclin_B; CyclinB_synthesis_by_FOXM1*hill(FOXM1, 0.5, 2)*(1 - (active_Cyclin_B_CDK1 + Cyclin_B));  // modifiers: FOXM1, active_Cyclin_B_CDK1
  re61: active_Cyclin_B_CDK1 => Cyclin_B; CyclinB_deactivation*active_Cyclin_B_CDK1;
  re62: Cyclin_B => active_Cyclin_B_CDK1; CyclinB_activation*hill(s114, mitotic_entry_k, mitotic_entry_n)*Cyclin_B + mm(CyclinB_activation_by_CDC25C, CyclinB_activation_by_CDC25C_KM, p_CDC25C, Cyclin_B);  // modifiers: p_CDC25C, s114
  re63: Cyclin_B => s8; CyclinB_degradation*Cyclin_B + mm(CyclinB_degradation_by_CDC20, CyclinB_degradation_by_CDC20_KM, CDC20, Cyclin_B);  // modifiers: CDC20
  re71: CDC20_with_SAC => CDC20; CDC20_activation*hill(assembled_spindle, SAC_degradation_threshold, SAC_degradation_threshold_n)*CDC20_with_SAC;  // modifiers: assembled_spindle
  re74: s8 => CDC20_with_SAC; mitotic_checkpoint_assembly*hill(active_Cyclin_B_CDK1, mitotic_checkpoint_assembly_k, mitotic_checkpoint_assembly_n)*(1 - (CDC20 + CDC20_with_SAC));  // modifiers: CDC20, active_Cyclin_B_CDK1
  re114: s8 => unassembled_spindle; spindle_synthesis*hill(active_Cyclin_B_CDK1, spindle_synthesis_by_CyclinB_k, spindle_synthesis_by_CyclinB_n)*(1 - (assembled_spindle + unassembled_spindle));  // modifiers: active_Cyclin_B_CDK1, assembled_spindle
  re119: inactive_CDK1_sensor => active_CDK1_sensor; mm(CDK1_sensor_activation, CDK1_sensor_activation_KM, active_Cyclin_B_CDK1, inactive_CDK1_sensor);  // modifiers: active_Cyclin_B_CDK1
  re120: active_CDK1_sensor => inactive_CDK1_sensor; CDK1_sensor_deactivation*active_CDK1_sensor;
  re126: s108 => s8; CDK1_sensor_dilution*(1 - hill(nuclear_envelope, 0.5, 10));  // modifiers: nuclear_envelope
  re128: CDC25C => p_CDC25C; CDC25C_phosphorylation_by_CyclinB*hill(active_Cyclin_B_CDK1, CDC25C_phosphorylation_by_CyclinB_k, CDC25C_phosphorylation_by_CyclinB_n)*CDC25C;  // modifiers: active_Cyclin_B_CDK1
  re129: p_CDC25C => CDC25C; CDC25C_dephosphorylation*p_CDC25C;
  re130: s8 => FOXM1; FOXM1_synthesis*(1 - FOXM1)*(1 - hill(CDC20, 0.1, 16));  // modifiers: CDC20
  re131: FOXM1 => s8; mm(0.1, 0.001, CDC20, FOXM1);  // modifiers: CDC20
  re132: s8 => s112; chromatid_separation*hill(CDC20, chromatid_separation_k, chromatid_separation_n)*(1 - s112);  // modifiers: CDC20
  re133: unassembled_spindle => assembled_spindle; spindle_assembly*hill(unassembled_spindle, spindle_assembly_k, spindle_assembly_n);
  re134: nuclear_envelope => s8; nuclear_envelope_breakdown*hill(active_Cyclin_B_CDK1, nuclear_envelope_breakdown_k, nuclear_envelope_breakdown_n)*nuclear_envelope;  // modifiers: active_Cyclin_B_CDK1
  re135: s8 => s114; mitotic_entry*(1 - s114);
  re136: s8 => nuclear_envelope; nuclear_envelope_reformation*hill(s112, 0.5, 10)*(1 - nuclear_envelope);  // modifiers: s112

  // Unit definitions:
  unit substance = mole;
  unit volume = litre;
  unit area = metre^2;
  unit length = metre;
  unit time = second;
end
