// SBML level 2 version 4

function hill(x, k, n)
  x^n/(k^n + x^n);
end

function mm(kcat, km, e, s)
  kcat*e*s/(km + s);
end

model untitled()

  // Compartments:
  compartment default = 1 volume;

  // Species:
  substanceOnly species sink in default = 0;
  substanceOnly species active_E2F1 in default = 0;
  substanceOnly species E2F7 in default = 0;
  substanceOnly species translating_E2F7 in default = 0;
  substanceOnly species active_E2F7 in default = 0;
  substanceOnly species s23 in default = 0; s23 is "Cyclin E";
  substanceOnly species translating_Cyclin_E in default = 0;
  substanceOnly species s22 in default = 0; s22 is "Cyclin E";
  substanceOnly species active_CyclinE_CDK2 in default = 0;
  substanceOnly species s49 in default = 0; s49 is "CyclinA";
  substanceOnly species translating_CyclinA in default = 0;
  substanceOnly species s50 in default = 0; s50 is "CyclinA";
  substanceOnly species CyclinA_repression in default = 1;
  substanceOnly species active_CyclinA_CDK2 in default = 0;
  substanceOnly species active_CyclinA_CDK1 in default = 0;

  // Parameters:
  transcription = 0.001155245 substance;
  transcription_k = 0.3 substance;
  transcription_n = 4 dimensionless;
  translation_start = 0.00833333333 substance;
  translation = 0.000833333333 substance;
  mRNA_degradation = 0.001155245 substance;
  proteasomal_degradation_kcat = 0.001666667 substance;
  proteasomal_degradation_KM = 0.001 substance;
  mitogenic_signal_accumulation = 0.001 substance;
  E2F1_activation_by_mitogenic_signal = 0.1 substance;
  E2F1_activation_by_mitogenic_signal_k = 0.5 substance;
  E2F1_activation_by_mitogenic_signal_n = 10 substance;
  E2F1_activation_by_CyclinECDK2 = 0.1 substance;
  E2F1_deactivation = 0.0001 substance;
  transcription_inhibition_by_E2F7 = 0.99 substance;
  transcription_inhibition_by_E2F7_k = 0.3 substance;
  transcription_inhibition_by_E2F7_n = 10 substance;
  CyclinE_transcription = 0.001155245 substance;
  CyclinE_activation = 0.01 substance;
  CyclinE_deactivation = 0.0001 substance;
  CyclinE_inhibition_by_unlicensed_DNA_k = 0.01 substance;
  CyclinE_inhibition_by_unlicensed_DNA_n = 10 substance;
  CyclinE_degradation = 0.0001 substance;
  active_CyclinE_degradation = 5e-5 substance;
  Cdh1_activation = 0.001 substance;
  Cdh1_deactivation_by_Emi1 = 0.1 substance;
  Cdh1_deactivation_by_Emi1_KM = 0.1 substance;
  Cdh1_deactivation_by_CDK = 0.005 substance;
  Cdh1_deactivation_by_CDK_KM = 0.1 substance;
  p27_transcription = 0.001155245 substance;
  p27_activation = 0.0001 substance;
  p27_deactivation_by_mitogenic_signal = 0.1 substance;
  p27_deactivation_by_mitogenic_signal_k = 0.5 substance;
  p27_deactivation_by_mitogenic_signal_n = 10 substance;
  CKI_degradation_by_CDK2_k = 0.1 substance;
  CKI_degradation_by_CDK2_n = 4 substance;
  DNA_licensing = 0.0002 substance;
  DNA_licensing_inhibition_by_Geminin_k = 0.5 substance;
  DNA_licensing_inhibition_by_Geminin_n = 100 substance;
  DNA_licensing_by_Cdt1_k = 0.5 substance;
  DNA_licensing_by_Cdt1_n = 10 substance;
  origin_firing = 0.001666667 substance;
  origin_firing_by_replisome_k = 0.5 substance;
  origin_firing_by_replisome_n = 16 substance;
  origin_firing_by_CDK2_k = 0.3 substance;
  origin_firing_by_CDK2_n = 10 substance;
  DNA_replication = 0.0001 substance;
  DNA_replication_by_replisome_k = 0.5 substance;
  DNA_replication_by_replisome_n = 10 substance;
  max_replicating_DNA_fraction = 0.1 substance;
  DNA_reset = 0.001666667 substance;
  DNA_reset_inhibition_by_replisome_k = 0.1 substance;
  DNA_reset_inhibition_by_replisome_n = 10 substance;
  replisome_assembly = 0.01 substance;
  replisome_assembly_k = 0.1 substance;
  replisome_assembly_n = 10 substance;
  replisome_disassembly = 0.01 substance;
  replisome_disassembly_inhibition_by_replicatingDNA_k = 0.0001 substance;
  replisome_disassembly_inhibition_by_replicatingDNA_n = 4 substance;
  CyclinA_repression_restoration = 0.1 substance;
  CyclinA_derepression_by_CDK2 = 0.001 substance;
  CyclinA_derepression_by_CDK2_KM = 0.1 substance;
  CyclinA_transcription = 0.0002 substance;
  CyclinACDK2_activation = 1 substance;
  CyclinACDK2_activation_k = 2 substance;
  CyclinACDK2_deactivation = 0.001 substance;
  CyclinACDK1_activation = 0.01 substance;
  CyclinACDK1_deactivation = 0.001 substance;
  CDK_deactivation_by_CKI_k = 0.3 substance;
  CDK_deactivation_by_CKI_n = 4 substance;
  CDK_deactivation_by_CKI = 1 substance;
  CDK1_inhibition_by_replicating_DNA_k = 0.0001 substance;
  CDK1_inhibition_by_replicating_DNA_n = 10 substance;
  FoxM1_deactivation = 3e-5 substance;
  FoxM1_activation_by_CDK1 = 0.003 substance;
  FoxM1_activation_by_CDK1_k = 0.1 substance;
  FoxM1_activation_by_CDK1_n = 10 substance;
  G2_delay_synth = 0.1 substance;
  G2_delay_synth_k = 0.001 substance;
  G2_delay_synth_n = 10 substance;
  G2_delay = 0.0001 substance;
  G2_delay_k = 0.1 substance;
  G2_delay_n = 10 substance;
  Wee1_deactivation_by_CDK1 = 0.1 substance;
  Wee1_deactivation_by_CDK1_k = 0.1 substance;
  Wee1_deactivation_by_CDK1_n = 10 substance;
  Wee1_activation = 0.001 substance;
  Wee1_activation_by_G2_delay = 1 substance;
  Wee1_activation_by_G2_delay_k = 0.1 substance;
  Wee1_activation_by_G2_delay_n = 10 substance;
  CyclinB_transcription = 0.001155245 substance;
  CyclinB_activation = 0.01 substance;
  CyclinB_activation_by_CDC25C_kcat = 0.1 substance;
  CyclinB_activation_by_CDC25C_KM = 0.5 substance;
  CyclinB_deactivation = 0.01 substance;
  CyclinB_deactivation_by_Wee1_kcat = 0.1 substance;
  CyclinB_deactivation_by_Wee1_KM = 0.5 substance;
  CDC25C_activation = 0.01 substance;
  CDC25C_deactivation_by_CDK1 = 0.01 substance;
  CDC25C_deactivation_by_CDK1_k = 0.1 substance;
  CDC25C_deactivation_by_CDK1_n = 11 substance;
  nuclear_envelope_breakdown = 0.1 substance;
  nuclear_envelope_breakdown_k = 0.5 substance;
  nuclear_envelope_breakdown_n = 16 substance;
  spindle_synthesis = 0.01 substance;
  spindle_synthesis_by_CyclinB_k = 0.6 substance;
  spindle_synthesis_by_CyclinB_n = 16 substance;
  spindle_assembly_kcat = 0.001 substance;
  spindle_assembly_KM = 0.001 substance;
  CDC20_inhibition_by_MCC_k = 0.97 substance;
  CDC20_inhibition_by_MCC_n = 500 substance;
  chromatid_separation_rate = 0.01 substance;
  cytokinesis_rate = 0.0016667 substance;
  mitotic_checkpoint_assembly = 0.1 substance;
  mitotic_checkpoint_assembly_k = 0.5 substance;
  mitotic_checkpoint_assembly_n = 10 substance;
  CDC20_activation = 0.01 substance;
  CDC20_degradation = 5e-5 substance;
  chromatid_separation_k = 0.5 substance;
  chromatid_separation_n = 16 substance;
  CDK2_sensor_activation_by_CDK2CycE = 0.0003 substance;
  CDK2_sensor_activation_by_CDK2CycA = 0.015 substance;
  CDK2_sensor_activation_by_CDK2_KM = 0.0003 substance;
  CDK2_sensor_deactivation = 0.0017 substance;
  CDK2_sensor_base_activation = 1.651962e-6 substance;
  p21_transcription = 0.001155245 substance;
  p21_degradation = 6e-5 substance;
  DNA_damage_repair_rate = 2e-5 substance;
  DNA_damage_rate = 0.0004 substance;
  Emi1_transcription = 0.001155245 substance;
  Geminin_transcription = 0.001155245 substance;

  // Reactions:
  re9: E2F7 => translating_E2F7; translation_start*E2F7*(1 - (active_E2F7 + translating_E2F7));  // modifiers: active_E2F7
  re10: translating_E2F7 => active_E2F7 + E2F7; translation*translating_E2F7;
  re11: sink => E2F7; transcription*hill(active_E2F1, transcription_k, transcription_n);  // modifiers: active_E2F1
  re13: E2F7 => sink; mRNA_degradation*E2F7;
  re15: active_E2F1 => sink; mm(proteasomal_degradation_kcat, proteasomal_degradation_KM, s16, active_E2F1);
  re16: active_E2F7 => sink; mm(proteasomal_degradation_kcat, proteasomal_degradation_KM, s14 + s16, active_E2F7);
  re25: s23 => translating_Cyclin_E; translation*s23*(1 - (s22 + active_CyclinE_CDK2 + translating_Cyclin_E));  // modifiers: s22, active_CyclinE_CDK2
  re26: translating_Cyclin_E => s22 + s23; translation*translating_Cyclin_E;
  re27: s22 => sink; CyclinE_degradation*s22;
  re29: sink => s23; CyclinE_transcription*hill(active_E2F1, transcription_k, transcription_n)*(1 - transcription_inhibition_by_E2F7*hill(active_E2F7, transcription_inhibition_by_E2F7_k, transcription_inhibition_by_E2F7_n));  // modifiers: active_E2F1, active_E2F7
  re30: s23 => sink; mRNA_degradation*s23;
  re34: s22 => active_CyclinE_CDK2; CyclinE_activation*(1 - hill(s43, CyclinE_inhibition_by_unlicensed_DNA_k, CyclinE_inhibition_by_unlicensed_DNA_n))*s22*(1 - (active_CyclinE_CDK2 + active_CyclinA_CDK2));  // modifiers: active_CyclinA_CDK2
  re35: active_CyclinE_CDK2 => s22; (CyclinE_deactivation + CDK_deactivation_by_CKI*hill(s30 + s155, CDK_deactivation_by_CKI_k, CDK_deactivation_by_CKI_n))*active_CyclinE_CDK2;
  re62: s49 => translating_CyclinA; translation*s49*(2 - (active_CyclinA_CDK2 + active_CyclinA_CDK1 + s50 + translating_CyclinA));  // modifiers: active_CyclinA_CDK2, active_CyclinA_CDK1, s50
  re63: translating_CyclinA => s50 + s49; translation*translating_CyclinA;
  re64: sink => s49; CyclinA_transcription*hill(active_E2F1, transcription_k, transcription_n)*(1 - CyclinA_repression);  // modifiers: CyclinA_repression, active_E2F1
  re65: s49 => sink; mRNA_degradation*s49;
  re66: sink => CyclinA_repression; CyclinA_repression_restoration*hill(s137, nuclear_envelope_breakdown_k, nuclear_envelope_breakdown_n)*(1 - CyclinA_repression);
  re67: CyclinA_repression => sink; mm(CyclinA_derepression_by_CDK2, CyclinA_derepression_by_CDK2_KM, active_CyclinE_CDK2 + active_CyclinA_CDK2, CyclinA_repression);  // modifiers: active_CyclinA_CDK2, active_CyclinE_CDK2
  re68: s50 => active_CyclinA_CDK2; CyclinACDK2_activation*s50*(1 - (active_CyclinE_CDK2 + active_CyclinA_CDK2)^CyclinACDK2_activation_k);  // modifiers: active_CyclinE_CDK2
  re69: active_CyclinA_CDK2 => s50; (CyclinACDK2_deactivation + CDK_deactivation_by_CKI*hill(s30 + s155, CDK_deactivation_by_CKI_k, CDK_deactivation_by_CKI_n))*active_CyclinA_CDK2;
  re71: active_CyclinE_CDK2 => sink; mm(active_CyclinE_degradation, proteasomal_degradation_KM, 1, active_CyclinE_CDK2);
  re72: active_CyclinA_CDK1 => s50; (CyclinACDK1_deactivation + CDK_deactivation_by_CKI*hill(s30 + s155, CDK_deactivation_by_CKI_k, CDK_deactivation_by_CKI_n))*active_CyclinA_CDK1;
  re73: s50 => active_CyclinA_CDK1; CyclinACDK1_activation*(1 - hill(s45, CDK1_inhibition_by_replicating_DNA_k, CDK1_inhibition_by_replicating_DNA_n))*s50;
  re74: active_CyclinA_CDK2 => sink; mm(proteasomal_degradation_kcat, proteasomal_degradation_KM, s14 + s145 + s144, active_CyclinA_CDK2);
  re75: active_CyclinA_CDK1 => sink; mm(proteasomal_degradation_kcat, proteasomal_degradation_KM, s14 + s145 + s144, active_CyclinA_CDK1);
  re76: s50 => sink; mm(proteasomal_degradation_kcat, proteasomal_degradation_KM, s14 + s145 + s144, s50);
  re121: translating_Cyclin_E => sink; mRNA_degradation*translating_Cyclin_E;
  re123: translating_CyclinA => sink; mRNA_degradation*translating_CyclinA;
  re126: translating_E2F7 => sink; mRNA_degradation*translating_E2F7;

  // Unit definitions:
  unit substance = mole;
  unit volume = litre;
  unit area = metre^2;
  unit length = metre;
  unit time = second;
end
